<?xml version="1.0"?>
<fdm_config name="Gaudet" version="2.0">

    <fileheader>
        <author>Isabel Moore</author>
        <description>
          Gaudet — auto-generated from YAML config.
          Weight: 1003.0 lbs, Length: 246.0 in,
          Diameter: 1.020 ft
        </description>
    </fileheader>

    <metrics>
        <wingarea unit="FT2"> 0.81 </wingarea>
        <wingspan unit="FT"> 4.13 </wingspan>
        <chord unit="FT"> 1.02 </chord>
        <htailarea unit="FT2"> 0 </htailarea>
        <htailarm unit="FT"> 0 </htailarm>
        <vtailarea unit="FT2"> 0 </vtailarea>
        <vtailarm unit="FT"> 0 </vtailarm>
        <location name="AERORP" unit="IN">
            <x> 123.2 </x>
            <y> 0 </y>
            <z> 0 </z>
        </location>
        <location name="EYEPOINT" unit="IN">
            <x> 0 </x>
            <y> 0 </y>
            <z> 0 </z>
        </location>
        <location name="VRP" unit="IN">
            <x> 123.2 </x>
            <y> 0 </y>
            <z> 0 </z>
        </location>
    </metrics>

    <mass_balance>
        <ixx unit="SLUG*FT2"> 8.06 </ixx>
        <iyy unit="SLUG*FT2"> 1094.0 </iyy>
        <izz unit="SLUG*FT2"> 1094.0 </izz>
        <emptywt unit="LBS"> 1003.0 </emptywt>
        <location name="CG" unit="IN">
            <x> 123.2 </x>
            <y> 0 </y>
            <z> 0 </z>
        </location>
    </mass_balance>

    <ground_reactions>
    </ground_reactions>

    <propulsion>
        <engine file="no_thrust_rocket">
            <location unit="M">
                <x> 3.8 </x>
                <y> 0 </y>
                <z> 0 </z>
            </location>
            <orient unit="DEG">
                <roll> 0.0 </roll>
                <pitch> 0 </pitch>
                <yaw> 0 </yaw>
            </orient>
            <feed>0</feed>
            <thruster file="no_thrust_nozzle">
                <location unit="IN">
                    <x> 3.8 </x>
                    <y> 0 </y>
                    <z> 0 </z>
                </location>
                <orient unit="DEG">
                    <roll> 0.0 </roll>
                    <pitch> 0.0 </pitch>
                    <yaw> 0.0 </yaw>
                </orient>
            </thruster>
        </engine>
        <tank type="FUEL">
            <location unit="IN">
                <x> 123.2 </x>
                <y> 0 </y>
                <z> 0 </z>
            </location>
            <capacity unit="KG"> 0 </capacity>
            <contents unit="KG"> 0 </contents>
        </tank>
    </propulsion>

    <flight_control name="FCS: Gaudet">

        <channel name="Pitch">
            <aerosurface_scale name="Elevator Rate Scale">
                <input>fcs/elevator-cmd-norm</input>
                <range>
                    <min> -0.6981 </min>
                    <max>  0.6981 </max>
                </range>
                <output>fcs/elevator-rate-rad_sec</output>
            </aerosurface_scale>
            <integrator name="Elevator Position Integrator">
                <input>fcs/elevator-rate-rad_sec</input>
                <c1> 1.0 </c1>
                <clipto>
                    <min> -0.1745 </min>
                    <max>  0.1745 </max>
                </clipto>
                <output>fcs/elevator-pos-rad</output>
            </integrator>
        </channel>

        <channel name="Roll">
            <aerosurface_scale name="Aileron Rate Scale">
                <input>fcs/aileron-cmd-norm</input>
                <range>
                    <min> -0.01745 </min>
                    <max>  0.01745 </max>
                </range>
                <output>fcs/aileron-rate-rad_sec</output>
            </aerosurface_scale>
            <integrator name="Aileron Position Integrator">
                <input>fcs/aileron-rate-rad_sec</input>
                <c1> 1.0 </c1>
                <clipto>
                    <min> -0.00175 </min>
                    <max>  0.00175 </max>
                </clipto>
                <output>fcs/left-aileron-pos-rad</output>
            </integrator>
            <pure_gain name="Right Aileron Mirror">
                <input>fcs/left-aileron-pos-rad</input>
                <gain> 1.0 </gain>
                <output>fcs/right-aileron-pos-rad</output>
            </pure_gain>
        </channel>

        <channel name="Yaw">
            <aerosurface_scale name="Rudder Rate Scale">
                <input>fcs/rudder-cmd-norm</input>
                <range>
                    <min> -0.6981 </min>
                    <max>  0.6981 </max>
                </range>
                <output>fcs/rudder-rate-rad_sec</output>
            </aerosurface_scale>
            <integrator name="Rudder Position Integrator">
                <input>fcs/rudder-rate-rad_sec</input>
                <c1> 1.0 </c1>
                <clipto>
                    <min> -0.1745 </min>
                    <max>  0.1745 </max>
                </clipto>
                <output>fcs/rudder-pos-rad</output>
            </integrator>
        </channel>

    </flight_control>

    <aerodynamics>

        <axis name="DRAG">
            <function name="aero/coefficient/CA_base">
                <description>Base_axial_drag</description>
                <product>
                    <property>aero/qbar-psf</property>
                    <property>metrics/Sw-sqft</property>
                    <value> 0.35 </value>
                </product>
            </function>
            <function name="aero/coefficient/CA_induced">
                <description>Induced_drag_from_lift</description>
                <product>
                    <property>aero/qbar-psf</property>
                    <property>metrics/Sw-sqft</property>
                    <value> 4.0 </value>
                    <sum>
                        <abs><property>aero/alpha-rad</property></abs>
                        <abs><property>aero/beta-rad</property></abs>
                    </sum>
                </product>
            </function>
        </axis>

        <axis name="LIFT">
            <function name="aero/coefficient/CN_body_wing">
                <description>Normal_force_body_wing_linear</description>
                <product>
                    <property>aero/qbar-psf</property>
                    <property>metrics/Sw-sqft</property>
                    <value> 6.0 </value>
                    <property>aero/alpha-rad</property>
                </product>
            </function>
            <function name="aero/coefficient/CN_crossflow">
                <description>Normal_force_body_crossflow</description>
                <product>
                    <property>aero/qbar-psf</property>
                    <property>metrics/Sw-sqft</property>
                    <value> 38.5 </value>
                    <property>aero/alpha-rad</property>
                    <abs><property>aero/alpha-rad</property></abs>
                </product>
            </function>
            <function name="aero/coefficient/CN_tail_alpha">
                <description>Normal_force_tail_due_to_alpha</description>
                <product>
                    <property>aero/qbar-psf</property>
                    <property>metrics/Sw-sqft</property>
                    <value> 4.0 </value>
                    <property>aero/alpha-rad</property>
                </product>
            </function>
            <function name="aero/coefficient/CN_tail_elevator">
                <description>Normal_force_tail_due_to_elevator</description>
                <product>
                    <property>aero/qbar-psf</property>
                    <property>metrics/Sw-sqft</property>
                    <value> -4.0 </value>
                    <property>fcs/elevator-pos-rad</property>
                </product>
            </function>
        </axis>

        <axis name="SIDE">
            <function name="aero/coefficient/CY_body_wing">
                <description>Side_force_body_wing_linear</description>
                <product>
                    <property>aero/qbar-psf</property>
                    <property>metrics/Sw-sqft</property>
                    <value> -6.0 </value>
                    <property>aero/beta-rad</property>
                </product>
            </function>
            <function name="aero/coefficient/CY_crossflow">
                <description>Side_force_body_crossflow</description>
                <product>
                    <property>aero/qbar-psf</property>
                    <property>metrics/Sw-sqft</property>
                    <value> -38.5 </value>
                    <property>aero/beta-rad</property>
                    <abs><property>aero/beta-rad</property></abs>
                </product>
            </function>
            <function name="aero/coefficient/CY_tail_beta">
                <description>Side_force_tail_due_to_beta</description>
                <product>
                    <property>aero/qbar-psf</property>
                    <property>metrics/Sw-sqft</property>
                    <value> -4.0 </value>
                    <property>aero/beta-rad</property>
                </product>
            </function>
            <function name="aero/coefficient/CY_rudder">
                <description>Side_force_tail_due_to_rudder</description>
                <product>
                    <property>aero/qbar-psf</property>
                    <property>metrics/Sw-sqft</property>
                    <value> 4.0 </value>
                    <property>fcs/rudder-pos-rad</property>
                </product>
            </function>
        </axis>

        <axis name="PITCH">
            <function name="aero/coefficient/Cm_alpha">
                <description>Pitch_moment_due_to_alpha</description>
                <product>
                    <property>aero/qbar-psf</property>
                    <property>metrics/Sw-sqft</property>
                    <property>metrics/cbarw-ft</property>
                    <value> -20.4 </value>
                    <property>aero/alpha-rad</property>
                </product>
            </function>
            <function name="aero/coefficient/Cm_elevator">
                <description>Pitch_moment_due_to_elevator</description>
                <product>
                    <property>aero/qbar-psf</property>
                    <property>metrics/Sw-sqft</property>
                    <property>metrics/cbarw-ft</property>
                    <value> 38.2 </value>
                    <property>fcs/elevator-pos-rad</property>
                </product>
            </function>
            <function name="aero/coefficient/Cm_q">
                <description>Pitch_damping</description>
                <product>
                    <property>aero/qbar-psf</property>
                    <property>metrics/Sw-sqft</property>
                    <property>metrics/cbarw-ft</property>
                    <property>aero/ci2vel</property>
                    <property>velocities/q-rad_sec</property>
                    <value> -20.0 </value>
                </product>
            </function>
        </axis>

        <axis name="YAW">
            <function name="aero/coefficient/Cn_beta">
                <description>Yaw_moment_due_to_beta</description>
                <product>
                    <property>aero/qbar-psf</property>
                    <property>metrics/Sw-sqft</property>
                    <property>metrics/bw-ft</property>
                    <value> 20.4 </value>
                    <property>aero/beta-rad</property>
                </product>
            </function>
            <function name="aero/coefficient/Cn_rudder">
                <description>Yaw_moment_due_to_rudder</description>
                <product>
                    <property>aero/qbar-psf</property>
                    <property>metrics/Sw-sqft</property>
                    <property>metrics/bw-ft</property>
                    <value> -38.2 </value>
                    <property>fcs/rudder-pos-rad</property>
                </product>
            </function>
            <function name="aero/coefficient/Cn_r">
                <description>Yaw_damping</description>
                <product>
                    <property>aero/qbar-psf</property>
                    <property>metrics/Sw-sqft</property>
                    <property>metrics/bw-ft</property>
                    <property>aero/bi2vel</property>
                    <property>velocities/r-rad_sec</property>
                    <value> -20.0 </value>
                </product>
            </function>
        </axis>

        <axis name="ROLL">
            <function name="aero/coefficient/Cl_aileron">
                <description>Roll_moment_due_to_aileron</description>
                <product>
                    <property>aero/qbar-psf</property>
                    <property>metrics/Sw-sqft</property>
                    <property>metrics/bw-ft</property>
                    <property>fcs/left-aileron-pos-rad</property>
                    <value> 0.5 </value>
                </product>
            </function>
            <function name="aero/coefficient/Cl_coupling">
                <description>Roll_coupling_alpha_beta</description>
                <product>
                    <property>aero/qbar-psf</property>
                    <property>metrics/Sw-sqft</property>
                    <property>metrics/bw-ft</property>
                    <value> 0.1 </value>
                    <property>aero/alpha-rad</property>
                    <property>aero/beta-rad</property>
                </product>
            </function>
            <function name="aero/coefficient/Cl_p">
                <description>Roll_damping</description>
                <product>
                    <property>aero/qbar-psf</property>
                    <property>metrics/Sw-sqft</property>
                    <property>metrics/bw-ft</property>
                    <property>aero/bi2vel</property>
                    <property>velocities/p-rad_sec</property>
                    <value> -5.0 </value>
                </product>
            </function>
        </axis>

    </aerodynamics>

</fdm_config>
